# Лабораторна робота #2 Виконав студент групи ІС-31 Коваль Богдан
# Об'явимо змінні:
k := 11 - 11
α := 0.25*k
β := 0.35*k
# Подані матриці:
A := [
    5.18 + α, 1.12, 0.95, 1.32, 0.83;
    1.12, 4.28 - α, 2.12, 0.57, 0.91;
    0.95, 2.12, 6.13 + α, 1.29, 1.57;
    1.32, 0.57, 1.29, 4.57 - α, 1.25;
    0.83, 0.91, 1.57, 1.25, 5.21 + α
]
B := [6.19 + β; 3.21; 4.28 - β; 6.25; 4.95 + β]
# Знаходимо елементи t матриць-множникiв:
t := Cholesky(A, 0, 1)
A = [
    5.18, 1.12, 0.95, 1.32, 0.83;
    1.12, 4.28, 2.12, 0.57, 0.91;
    0.95, 2.12, 6.13, 1.29, 1.57;
    1.32, 0.57, 1.29, 4.57, 1.25;
    0.83, 0.91, 1.57, 1.25, 5.21
]
B = [6.19; 3.21; 4.28; 6.25; 4.95]
t = [
    2.27596, 0.4921, 0.417406, 0.579975, 0.364681;
    0, 2.00944, 0.952801, 0.141629, 0.363555;
    0, 0, 2.24676, 0.406349, 0.476857;
    0, 0, 0, 2.01208, 0.394236;
    0, 0, 0, 0, 2.13589
]
C := t*transpose(t)
# Знаходимо елементи t` матриць-множникiв:
C = [
    6.06575, 1.60127, 1.34739, 1.31072, 0.778918;
    1.60127, 5.0979, 2.37163, 0.428295, 0.776513;
    1.34739, 2.37163, 5.44045, 1.0056, 1.01851;
    1.31072, 0.428295, 1.0056, 4.20387, 0.842045;
    0.778918, 0.776513, 1.01851, 0.842045, 4.56202
]
transpose(t) = [
    2.27596, 0, 0, 0, 0;
    0.4921, 2.00944, 0, 0, 0;
    0.417406, 0.952801, 2.24676, 0, 0;
    0.579975, 0.141629, 0.406349, 2.01208, 0;
    0.364681, 0.363555, 0.476857, 0.394236, 2.13589
]
# Розв'язання системи U^T * Y = B
# Розв'язання системи U * X = Y
M := lsolve(A, B)
y := transpose(t)^-1*B
x := t^-1*y
# Визначники
x = [0.798379; 0.224531; 0.172232; 0.920645; 0.510904]
M = [0.798379; 0.224531; 0.172232; 0.920645; 0.510904]
y = [2.71973; 0.931416; 1.0047; 2.05382; 1.09123]
det(A) = 1950.02
det(C) = 1950.02
# х з програми
# Результати перевiрок: вектор нев'язки r = b - Ax
r := B - A*x
n := 4
z := [0.7988378920; 0.2245311100; 0.1722320152; 0.9206449304; 0.5109040043]
r = [0; -4.44089e-16; 0; 0; -8.88178e-16]
δ := sqrt(1/n*sum((z[n] - x[n])^2, k = 1 .. n))
δ = 3.63983e-7
